brick
  0.0541
 0 0 0
  0.6541  0.3057  2.1397
  0.4787  0.0000  0.0415
  0.0000

SURFACE
WING
 18.0000  1.0000 30.0000 -2.0000
ANGLE
  0.0000
COMPONENT
 2
YDUPLICATE
 0
SECTION
  0.3817  0.0000  0.0000  0.3057  0.0000  0.0000  0.0000
AFIL
W_FX60_avl.dat
SECTION
  0.3817  0.5661  0.0000  0.3057  0.0000  0.0000  0.0000
AFIL
W_FX60_avl.dat
CONTROL
aileron  1.0000  0.7500  0.0000  1.0000  0.0000 -1.0000
SECTION
  0.3817  1.0164  0.0000  0.3057  0.0000  0.0000  0.0000
AFIL
W_FX60_avl.dat
CONTROL
aileron  1.0000  0.7500  0.0000  1.0000  0.0000 -1.0000
SECTION
  0.3817  1.0699  0.0000  0.3057  0.0000  0.0000  0.0000
AFIL
W_FX60_avl.dat

SURFACE
WING3
 18.0000  1.0000 30.0000 -2.0000
ANGLE
  0.0000
COMPONENT
 2
YDUPLICATE
 0
SECTION
  1.0606  0.0000  0.0000  0.1847 -0.0287  0.0000  0.0000
AFIL
NACA0006_avl.dat
CONTROL
elevator  1.0000  0.7734  0.0000  1.0000  0.0000  1.0000
SECTION
  1.0606  0.4309  0.0000  0.1847 -0.0287  0.0000  0.0000
AFIL
NACA0006_avl.dat

CONTROL
elevator  1.0000  0.7734  0.0000  1.0000  0.0000  1.0000
